# OpenSim document version 30000
Model bodyModel:
  length_units: meters
  force_units: N
  gravity: 0 -9.80665 0
  credits:
    Frank Anderson, Peter Loan, Ayman Habib, Ajay Seth, Michael Sherman
  BodySet:
    Body ground: mass=0 mass_center=(0 0 0) inertia_xx=1 inertia_yy=1 inertia_zz=1
    Body pelvis: mass=0 mass_center=(0 0 0) inertia_xx=0 inertia_yy=0 inertia_zz=0
        meshes=(sacrum.vtp pelvis.vtp l_pelvis.vtp)
      PinJoint ground_pelvis: parent_body=ground location_in_parent=(0 0 0) location=(0 0 0)
        Coordinate ground_pelvis_coord_0: motion_type=rotational
    Body femur_l: mass=0 mass_center=(0 0 0) inertia_xx=0 inertia_yy=0 inertia_zz=0 meshes=femur_l.vtp
      FreeJoint hip_l: parent_body=pelvis location_in_parent=(-0.0707 -0.0661 -0.0835) location=(0 0 0)
        Coordinate hip_l_xRotation: motion_type=rotational range=(0 0)
        Coordinate hip_l_yRotation: motion_type=rotational range=(0 0)
        Coordinate hip_l_zRotation: motion_type=rotational range=(-2.617994 2.617994)
        Coordinate hip_l_xTranslation: motion_type=translational range=(-0.01 0.01)
        Coordinate hip_l_yTranslation: motion_type=translational range=(-0.01 0.01)
        Coordinate hip_l_zTranslation: motion_type=translational range=(-0.01 0.01)
    Body femur_r: mass=0 mass_center=(0 0 0) inertia_xx=0 inertia_yy=0 inertia_zz=0 meshes=femur_r.vtp
      FreeJoint hip_r: parent_body=pelvis location_in_parent=(-0.0707 -0.0661 0.0835) location=(0 0 0)
        Coordinate hip_r_xRotation: motion_type=rotational range=(0 0)
        Coordinate hip_r_yRotation: motion_type=rotational range=(0 0)
        Coordinate hip_r_zRotation: motion_type=rotational range=(-2.617994 2.617994)
        Coordinate hip_r_xTranslation: motion_type=translational range=(-0.01 0.01)
        Coordinate hip_r_yTranslation: motion_type=translational range=(-0.01 0.01)
        Coordinate hip_r_zTranslation: motion_type=translational range=(-0.01 0.01)
    Body tibia_l: mass=0 mass_center=(0 0 0) inertia_xx=0 inertia_yy=0 inertia_zz=0 meshes=(tibia_l.vtp fibula_l.vtp)
      FreeJoint knee_l: parent_body=femur_l location_in_parent=(0 0 0) location=(0 0 0)
        Coordinate knee_l_xRotation: motion_type=rotational range=(0 0)
        Coordinate knee_l_yRotation: motion_type=rotational range=(0 0)
        Coordinate knee_l_zRotation: motion_type=rotational range=(-2.617994 2.617994)
        Coordinate knee_l_xTranslation: motion_type=translational range=(-0.01 0.01)
        Coordinate knee_l_yTranslation: motion_type=translational range=(-0.01 0.01)
        Coordinate knee_l_zTranslation: motion_type=translational range=(-0.01 0.01)
    Body talus_l: mass=0 mass_center=(0 0 0) inertia_xx=0 inertia_yy=0 inertia_zz=0 meshes=talus_lv.vtp
      FreeJoint ankle_l: parent_body=tibia_l location_in_parent=(0 -0.43 0) location=(0 0 0)
        Coordinate ankle_l_xRotation: motion_type=rotational range=(0 0)
        Coordinate ankle_l_yRotation: motion_type=rotational range=(0 0)
        Coordinate ankle_l_zRotation: motion_type=rotational range=(-2.617994 2.617994)
        Coordinate ankle_l_xTranslation: motion_type=translational range=(-0.01 0.01)
        Coordinate ankle_l_yTranslation: motion_type=translational range=(-0.01 0.01)
        Coordinate ankle_l_zTranslation: motion_type=translational range=(-0.01 0.01)
    Body calcn_l: mass=0 mass_center=(0 0 0) inertia_xx=0 inertia_yy=0 inertia_zz=0 meshes=l_foot.vtp
      FreeJoint subtalar_l: parent_body=talus_l location_in_parent=(-0.04877 -0.04195 -0.00792) location=(0 0 0)
        Coordinate subtalar_l_xRotation: motion_type=rotational range=(0 0)
        Coordinate subtalar_l_yRotation: motion_type=rotational range=(0 0)
        Coordinate subtalar_l_zRotation: motion_type=rotational range=(-2.617994 2.617994)
        Coordinate subtalar_l_xTranslation: motion_type=translational range=(-0.01 0.01)
        Coordinate subtalar_l_yTranslation: motion_type=translational range=(-0.01 0.01)
        Coordinate subtalar_l_zTranslation: motion_type=translational range=(-0.01 0.01)
    Body tibia_r: mass=0 mass_center=(0 0 0) inertia_xx=0 inertia_yy=0 inertia_zz=0 meshes=(tibia_r.vtp fibula_r.vtp)
      FreeJoint knee_r: parent_body=femur_r location_in_parent=(0 0 0) location=(0 0 0)
        Coordinate knee_r_xRotation: motion_type=rotational range=(0 0)
        Coordinate knee_r_yRotation: motion_type=rotational range=(0 0)
        Coordinate knee_r_zRotation: motion_type=rotational range=(-2.617994 2.617994)
        Coordinate knee_r_xTranslation: motion_type=translational range=(-0.01 0.01)
        Coordinate knee_r_yTranslation: motion_type=translational range=(-0.01 0.01)
        Coordinate knee_r_zTranslation: motion_type=translational range=(-0.01 0.01)
    Body talus_r: mass=0 mass_center=(0 0 0) inertia_xx=0 inertia_yy=0 inertia_zz=0 meshes=talus_rv.vtp
      FreeJoint ankle_r: parent_body=tibia_r location_in_parent=(0 -0.43 0) location=(0 0 0)
        Coordinate ankle_r_xRotation: motion_type=rotational range=(0 0)
        Coordinate ankle_r_yRotation: motion_type=rotational range=(0 0)
        Coordinate ankle_r_zRotation: motion_type=rotational range=(-2.617994 2.617994)
        Coordinate ankle_r_xTranslation: motion_type=translational range=(-0.01 0.01)
        Coordinate ankle_r_yTranslation: motion_type=translational range=(-0.01 0.01)
        Coordinate ankle_r_zTranslation: motion_type=translational range=(-0.01 0.01)
    Body calcn_r: mass=0 mass_center=(0 0 0) inertia_xx=0 inertia_yy=0 inertia_zz=0 meshes=foot.vtp
      FreeJoint subtalar_r: parent_body=talus_r location_in_parent=(-0.04877 -0.04195 0.00792) location=(0 0 0)
        Coordinate subtalar_r_xRotation: motion_type=rotational range=(0 0)
        Coordinate subtalar_r_yRotation: motion_type=rotational range=(0 0)
        Coordinate subtalar_r_zRotation: motion_type=rotational range=(-2.617994 2.617994)
        Coordinate subtalar_r_xTranslation: motion_type=translational range=(-0.01 0.01)
        Coordinate subtalar_r_yTranslation: motion_type=translational range=(-0.01 0.01)
        Coordinate subtalar_r_zTranslation: motion_type=translational range=(-0.01 0.01)
    Body toes_l: mass=0 mass_center=(0 0 0) inertia_xx=0 inertia_yy=0 inertia_zz=0 meshes=l_bofoot.vtp
      FreeJoint mtp_l: parent_body=calcn_l location_in_parent=(0.1788 -0.002 -0.00108) location=(0 0 0)
        Coordinate mtp_l_xRotation: motion_type=rotational range=(0 0)
        Coordinate mtp_l_yRotation: motion_type=rotational range=(0 0)
        Coordinate mtp_l_zRotation: motion_type=rotational range=(-2.617994 2.617994)
        Coordinate mtp_l_xTranslation: motion_type=translational range=(-0.01 0.01)
        Coordinate mtp_l_yTranslation: motion_type=translational range=(-0.01 0.01)
        Coordinate mtp_l_zTranslation: motion_type=translational range=(-0.01 0.01)
    Body toes_r: mass=0 mass_center=(0 0 0) inertia_xx=0 inertia_yy=0 inertia_zz=0 meshes=bofoot.vtp
      FreeJoint mtp_r: parent_body=calcn_r location_in_parent=(0.1788 -0.002 0.00108) location=(0 0 0)
        Coordinate mtp_r_xRotation: motion_type=rotational range=(0 0)
        Coordinate mtp_r_yRotation: motion_type=rotational range=(0 0)
        Coordinate mtp_r_zRotation: motion_type=rotational range=(-2.617994 2.617994)
        Coordinate mtp_r_xTranslation: motion_type=translational range=(-0.01 0.01)
        Coordinate mtp_r_yTranslation: motion_type=translational range=(-0.01 0.01)
        Coordinate mtp_r_zTranslation: motion_type=translational range=(-0.01 0.01)
    Body torso: mass=26.82 mass_center=(0 0 0) inertia_xx=0.1788 inertia_yy=0.1788 inertia_zz=0.1788
        meshes=(hat_jaw.vtp hat_spine.vtp hat_skull.vtp hat_ribs_scap.vtp)
      FreeJoint back: parent_body=pelvis location_in_parent=(-0.1007 0.0815 0) location=(0 0 0)
        Coordinate back_xRotation: motion_type=rotational range=(0 0)
        Coordinate back_yRotation: motion_type=rotational range=(0 0)
        Coordinate back_zRotation: motion_type=rotational range=(-2.617994 2.617994)
        Coordinate back_xTranslation: motion_type=translational range=(-0.01 0.01)
        Coordinate back_yTranslation: motion_type=translational range=(-0.01 0.01)
        Coordinate back_zTranslation: motion_type=translational range=(-0.01 0.01)
    Body humerus_l: mass=0 mass_center=(0 0 0) inertia_xx=0 inertia_yy=0 inertia_zz=0 meshes=humerus_lv.vtp
      FreeJoint acromial_l: parent_body=torso location_in_parent=(0 0 0) location=(0 0 0)
        Coordinate acromial_l_xRotation: motion_type=rotational range=(0 0)
        Coordinate acromial_l_yRotation: motion_type=rotational range=(0 0)
        Coordinate acromial_l_zRotation: motion_type=rotational range=(-2.617994 2.617994)
        Coordinate acromial_l_xTranslation: motion_type=translational range=(-0.01 0.01)
        Coordinate acromial_l_yTranslation: motion_type=translational range=(-0.01 0.01)
        Coordinate acromial_l_zTranslation: motion_type=translational range=(-0.01 0.01)
    Body humerus_r: mass=0 mass_center=(0 0 0) inertia_xx=0 inertia_yy=0 inertia_zz=0 meshes=humerus_rv.vtp
      FreeJoint acromial_r: parent_body=torso location_in_parent=(0.003155 0.3715 -0.17) location=(0 0 0)
        Coordinate acromial_r_xRotation: motion_type=rotational range=(0 0)
        Coordinate acromial_r_yRotation: motion_type=rotational range=(0 0)
        Coordinate acromial_r_zRotation: motion_type=rotational range=(-2.617994 2.617994)
        Coordinate acromial_r_xTranslation: motion_type=translational range=(-0.01 0.01)
        Coordinate acromial_r_yTranslation: motion_type=translational range=(-0.01 0.01)
        Coordinate acromial_r_zTranslation: motion_type=translational range=(-0.01 0.01)
    Body ulna_l: mass=0 mass_center=(0 0 0) inertia_xx=0 inertia_yy=0 inertia_zz=0 meshes=ulna_lv.vtp
      FreeJoint elbow_l: parent_body=humerus_l location_in_parent=(0 0 0) location=(0 0 0)
        Coordinate elbow_l_xRotation: motion_type=rotational range=(0 0)
        Coordinate elbow_l_yRotation: motion_type=rotational range=(0 0)
        Coordinate elbow_l_zRotation: motion_type=rotational range=(-2.617994 2.617994)
        Coordinate elbow_l_xTranslation: motion_type=translational range=(-0.01 0.01)
        Coordinate elbow_l_yTranslation: motion_type=translational range=(-0.01 0.01)
        Coordinate elbow_l_zTranslation: motion_type=translational range=(-0.01 0.01)
    Body radius_l: mass=0 mass_center=(0 0 0) inertia_xx=0 inertia_yy=0 inertia_zz=0 meshes=radius_lv.vtp
      FreeJoint radioulnar_l: parent_body=ulna_l location_in_parent=(0 0 0) location=(0 0 0)
        Coordinate radioulnar_l_xRotation: motion_type=rotational range=(0 0)
        Coordinate radioulnar_l_yRotation: motion_type=rotational range=(0 0)
        Coordinate radioulnar_l_zRotation: motion_type=rotational range=(-2.617994 2.617994)
        Coordinate radioulnar_l_xTranslation: motion_type=translational range=(-0.01 0.01)
        Coordinate radioulnar_l_yTranslation: motion_type=translational range=(-0.01 0.01)
        Coordinate radioulnar_l_zTranslation: motion_type=translational range=(-0.01 0.01)
    Body hand_l: mass=0 mass_center=(0 0 0) inertia_xx=0 inertia_yy=0 inertia_zz=0
        meshes=(pisiform_lsv.vtp lunate_lsv.vtp scaphoid_lsv.vtp triquetrum_lsv.vtp hamate_lsv.vtp capitate_lsv.vtp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)
      FreeJoint radius_hand_l: parent_body=radius_l location_in_parent=(0 0 0) location=(0 0 0)
        Coordinate radius_hand_l_xRotation: motion_type=rotational range=(0 0)
        Coordinate radius_hand_l_yRotation: motion_type=rotational range=(0 0)
        Coordinate radius_hand_l_zRotation: motion_type=rotational range=(-2.617994 2.617994)
        Coordinate radius_hand_l_xTranslation: motion_type=translational range=(-0.01 0.01)
        Coordinate radius_hand_l_yTranslation: motion_type=translational range=(-0.01 0.01)
        Coordinate radius_hand_l_zTranslation: motion_type=translational range=(-0.01 0.01)
    Body ulna_r: mass=0 mass_center=(0 0 0) inertia_xx=0 inertia_yy=0 inertia_zz=0 meshes=ulna_rv.vtp
      FreeJoint elbow_r: parent_body=humerus_r location_in_parent=(0.013144 -0.286273 0.009595) location=(0 0 0)
        Coordinate elbow_r_xRotation: motion_type=rotational range=(0 0)
        Coordinate elbow_r_yRotation: motion_type=rotational range=(0 0)
        Coordinate elbow_r_zRotation: motion_type=rotational range=(-2.617994 2.617994)
        Coordinate elbow_r_xTranslation: motion_type=translational range=(-0.01 0.01)
        Coordinate elbow_r_yTranslation: motion_type=translational range=(-0.01 0.01)
        Coordinate elbow_r_zTranslation: motion_type=translational range=(-0.01 0.01)
    Body radius_r: mass=0 mass_center=(0 0 0) inertia_xx=0 inertia_yy=0 inertia_zz=0 meshes=radius_rv.vtp
      FreeJoint radioulnar_r: parent_body=ulna_r location_in_parent=(-0.006727 -0.013007 -0.026083) location=(0 0 0)
        Coordinate radioulnar_r_xRotation: motion_type=rotational range=(0 0)
        Coordinate radioulnar_r_yRotation: motion_type=rotational range=(0 0)
        Coordinate radioulnar_r_zRotation: motion_type=rotational range=(-2.617994 2.617994)
        Coordinate radioulnar_r_xTranslation: motion_type=translational range=(-0.01 0.01)
        Coordinate radioulnar_r_yTranslation: motion_type=translational range=(-0.01 0.01)
        Coordinate radioulnar_r_zTranslation: motion_type=translational range=(-0.01 0.01)
    Body hand_r: mass=0 mass_center=(0 0 0) inertia_xx=0 inertia_yy=0 inertia_zz=0
        meshes=(pisiform_rsv.vtp lunate_rsv.vtp scaphoid_rsv.vtp triquetrum_rsv.vtp hamate_rsv.vtp capitate_rsv.vtp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)
      FreeJoint radius_hand_r: parent_body=radius_r location_in_parent=(-0.008797 -0.235841 -0.01361) location=(0 0 0)
        Coordinate radius_hand_r_xRotation: motion_type=rotational range=(0 0)
        Coordinate radius_hand_r_yRotation: motion_type=rotational range=(0 0)
        Coordinate radius_hand_r_zRotation: motion_type=rotational range=(-2.617994 2.617994)
        Coordinate radius_hand_r_xTranslation: motion_type=translational range=(-0.01 0.01)
        Coordinate radius_hand_r_yTranslation: motion_type=translational range=(-0.01 0.01)
        Coordinate radius_hand_r_zTranslation: motion_type=translational range=(-0.01 0.01)
