# OpenSim document version 30000
Model bodyModel:
  length_units: meters
  force_units: N
  gravity: 0 -9.80665 0
  credits:
    Frank Anderson, Peter Loan, Ayman Habib, Ajay Seth, Michael Sherman
  BodySet:
    Body ground: mass=0 mass_center=(0 0 0) inertia_xx=1 inertia_yy=1 inertia_zz=1
    Body calcn_l: mass=0 mass_center=(0 0 0) inertia_xx=0 inertia_yy=0 inertia_zz=0 meshes=l_foot.vtp
      FreeJoint subtalar_l: parent_body=talus_l location_in_parent=(-0.04877 -0.04195 -0.00792) location=(0 0 0)
        Coordinate subtalar_l_xRotation: motion_type=rotational range=(0 0)
        Coordinate subtalar_l_yRotation: motion_type=rotational range=(0 0)
        Coordinate subtalar_l_zRotation: motion_type=rotational range=(-2.617994 2.617994)
        Coordinate subtalar_l_xTranslation: motion_type=translational range=(-0.01 0.01)
        Coordinate subtalar_l_yTranslation: motion_type=translational range=(-0.01 0.01)
        Coordinate subtalar_l_zTranslation: motion_type=translational range=(-0.01 0.01)
