# OpenSim document version 30000
Model bodyModel:
  length_units: meters
  force_units: N
  gravity: 0 -9.80665 0
  credits:
    Frank Anderson, Peter Loan, Ayman Habib, Ajay Seth, Michael Sherman
  BodySet:
    Body ground: mass=0 mass_center=(0 0 0) inertia_xx=1 inertia_yy=1 inertia_zz=1
    Body pelvis: mass=0 mass_center=(0 0 0) inertia_xx=0 inertia_yy=0 inertia_zz=0
        meshes=(sacrum.vtp pelvis.vtp l_pelvis.vtp)
      PinJoint ground_pelvis: parent_body=ground location_in_parent=(0 0 0) location=(0 0 0)
        Coordinate ground_pelvis_coord_0: motion_type=rotational
    Body femur_l: mass=0 mass_center=(0 0 0) inertia_xx=0 inertia_yy=0 inertia_zz=0 meshes=femur_l.vtp
      CustomJoint hip_l: parent_body=pelvis location_in_parent=(-0.0707 -0.0661 -0.0835) location=(0 0 0)
        SpatialTransform: axes_held_at_zero=(rotation1 rotation2 rotation3 translation1 translation2 translation3)
    Body femur_r: mass=0 mass_center=(0 0 0) inertia_xx=0 inertia_yy=0 inertia_zz=0 meshes=femur_r.vtp
      CustomJoint hip_r: parent_body=pelvis location_in_parent=(-0.0707 -0.0661 0.0835) location=(0 0 0)
        SpatialTransform: axes_held_at_zero=(rotation1 rotation2 rotation3 translation1 translation2 translation3)
    Body tibia_l: mass=0 mass_center=(0 0 0) inertia_xx=0 inertia_yy=0 inertia_zz=0 meshes=(tibia_l.vtp fibula_l.vtp)
      CustomJoint knee_l: parent_body=femur_l location_in_parent=(0 0 0) location=(0 0 0)
        SpatialTransform: axes_held_at_zero=(rotation1 rotation2 rotation3 translation1 translation2 translation3)
    Body talus_l: mass=0 mass_center=(0 0 0) inertia_xx=0 inertia_yy=0 inertia_zz=0 meshes=talus_lv.vtp
      CustomJoint ankle_l: parent_body=tibia_l location_in_parent=(0 -0.43 0) location=(0 0 0)
        SpatialTransform: axes_held_at_zero=(rotation1 rotation2 rotation3 translation1 translation2 translation3)
    Body calcn_l: mass=0 mass_center=(0 0 0) inertia_xx=0 inertia_yy=0 inertia_zz=0 meshes=l_foot.vtp
      CustomJoint subtalar_l: parent_body=talus_l location_in_parent=(-0.04877 -0.04195 -0.00792) location=(0 0 0)
        SpatialTransform: axes_held_at_zero=(rotation1 rotation2 rotation3 translation1 translation2 translation3)
    Body tibia_r: mass=0 mass_center=(0 0 0) inertia_xx=0 inertia_yy=0 inertia_zz=0 meshes=(tibia_r.vtp fibula_r.vtp)
      CustomJoint knee_r: parent_body=femur_r location_in_parent=(0 0 0) location=(0 0 0)
        SpatialTransform: axes_held_at_zero=(rotation1 rotation2 rotation3 translation1 translation2 translation3)
    Body talus_r: mass=0 mass_center=(0 0 0) inertia_xx=0 inertia_yy=0 inertia_zz=0 meshes=talus_rv.vtp
      CustomJoint ankle_r: parent_body=tibia_r location_in_parent=(0 -0.43 0) location=(0 0 0)
        SpatialTransform: axes_held_at_zero=(rotation1 rotation2 rotation3 translation1 translation2 translation3)
    Body calcn_r: mass=0 mass_center=(0 0 0) inertia_xx=0 inertia_yy=0 inertia_zz=0 meshes=foot.vtp
      CustomJoint subtalar_r: parent_body=talus_r location_in_parent=(-0.04877 -0.04195 0.00792) location=(0 0 0)
        SpatialTransform: axes_held_at_zero=(rotation1 rotation2 rotation3 translation1 translation2 translation3)
    Body toes_l: mass=0 mass_center=(0 0 0) inertia_xx=0 inertia_yy=0 inertia_zz=0 meshes=l_bofoot.vtp
      CustomJoint mtp_l: parent_body=calcn_l location_in_parent=(0.1788 -0.002 -0.00108) location=(0 0 0)
        SpatialTransform: axes_held_at_zero=(rotation1 rotation2 rotation3 translation1 translation2 translation3)
    Body toes_r: mass=0 mass_center=(0 0 0) inertia_xx=0 inertia_yy=0 inertia_zz=0 meshes=bofoot.vtp
      CustomJoint mtp_r: parent_body=calcn_r location_in_parent=(0.1788 -0.002 0.00108) location=(0 0 0)
        SpatialTransform: axes_held_at_zero=(rotation1 rotation2 rotation3 translation1 translation2 translation3)
    Body torso: mass=26.82 mass_center=(0 0 0) inertia_xx=0.1788 inertia_yy=0.1788 inertia_zz=0.1788
        meshes=(hat_jaw.vtp hat_spine.vtp hat_skull.vtp hat_ribs_scap.vtp)
      CustomJoint back: parent_body=pelvis location_in_parent=(-0.1007 0.0815 0) location=(0 0 0)
        SpatialTransform: axes_held_at_zero=(rotation1 rotation2 rotation3 translation1 translation2 translation3)
    Body humerus_l: mass=0 mass_center=(0 0 0) inertia_xx=0 inertia_yy=0 inertia_zz=0 meshes=humerus_lv.vtp
      CustomJoint acromial_l: parent_body=torso location_in_parent=(0.003155 0.3715 -0.17) location=(0 0 0)
        SpatialTransform: axes_held_at_zero=(rotation1 rotation2 rotation3 translation1 translation2 translation3)
    Body humerus_r: mass=0 mass_center=(0 0 0) inertia_xx=0 inertia_yy=0 inertia_zz=0 meshes=humerus_rv.vtp
      CustomJoint acromial_r: parent_body=torso location_in_parent=(0.003155 0.3715 0.17) location=(0 0 0)
        SpatialTransform: axes_held_at_zero=(rotation1 rotation2 rotation3 translation1 translation2 translation3)
    Body ulna_l: mass=0 mass_center=(0 0 0) inertia_xx=0 inertia_yy=0 inertia_zz=0 meshes=ulna_lv.vtp
      CustomJoint elbow_l: parent_body=humerus_l location_in_parent=(0.013144 -0.286273 0.009595) location=(0 0 0)
        SpatialTransform: axes_held_at_zero=(rotation1 rotation2 rotation3 translation1 translation2 translation3)
    Body radius_l: mass=0 mass_center=(0 0 0) inertia_xx=0 inertia_yy=0 inertia_zz=0 meshes=radius_lv.vtp
      CustomJoint radioulnar_l: parent_body=ulna_l location_in_parent=(-0.006727 -0.013007 -0.026083) location=(0 0 0)
        SpatialTransform: axes_held_at_zero=(rotation1 rotation2 rotation3 translation1 translation2 translation3)
    Body hand_l: mass=0 mass_center=(0 0 0) inertia_xx=0 inertia_yy=0 inertia_zz=0
        meshes=(pisiform_lsv.vtp lunate_lsv.vtp scaphoid_lsv.vtp triquetrum_lsv.vtp hamate_lsv.vtp capitate_lsv.vtp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)
      CustomJoint radius_hand_l: parent_body=radius_l location_in_parent=(-0.008797 -0.235841 -0.01361)
          location=(0 0 0)
        SpatialTransform: axes_held_at_zero=(rotation1 rotation2 rotation3 translation1 translation2 translation3)
    Body ulna_r: mass=0 mass_center=(0 0 0) inertia_xx=0 inertia_yy=0 inertia_zz=0 meshes=ulna_rv.vtp
      CustomJoint elbow_r: parent_body=humerus_r location_in_parent=(0.013144 -0.286273 -0.009595) location=(0 0 0)
        SpatialTransform: axes_held_at_zero=(rotation1 rotation2 rotation3 translation1 translation2 translation3)
    Body radius_r: mass=0 mass_center=(0 0 0) inertia_xx=0 inertia_yy=0 inertia_zz=0 meshes=radius_rv.vtp
      CustomJoint radioulnar_r: parent_body=ulna_r location_in_parent=(-0.006727 -0.013007 0.026083) location=(0 0 0)
        SpatialTransform: axes_held_at_zero=(rotation1 rotation2 rotation3 translation1 translation2 translation3)
    Body hand_r: mass=0 mass_center=(0 0 0) inertia_xx=0 inertia_yy=0 inertia_zz=0
        meshes=(pisiform_rsv.vtp lunate_rsv.vtp scaphoid_rsv.vtp triquetrum_rsv.vtp hamate_rsv.vtp capitate_rsv.vtp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)
      CustomJoint radius_hand_r: parent_body=radius_r location_in_parent=(-0.008797 -0.235841 0.01361) location=(0 0 0)
        SpatialTransform: axes_held_at_zero=(rotation1 rotation2 rotation3 translation1 translation2 translation3)
