# OpenSim document version 30000
Model rightArmModel:
  length_units: meters
  force_units: N
  gravity: 0 -9.80665 0
  credits:
    Frank Anderson, Peter Loan, Ayman Habib, Ajay Seth, Michael Sherman
  BodySet:
    Body ground: mass=0 mass_center=(0 0 0) inertia_xx=1 inertia_yy=1 inertia_zz=1
        meshes=(ground_jaw.vtp ground_r_clavicle.vtp ground_r_scapula.vtp ground_ribs.vtp ground_skull.vtp ground_spine.vtp)
    Body upperArm: mass=20 mass_center=(0 0 0) inertia_xx=0.1333333 inertia_yy=0.1333333 inertia_zz=0.1333333
        meshes=arm_r_humerus.vtp
      FreeJoint r_shoulder: parent_body=ground location_in_parent=(-0.017545 -0.007 0.17) location=(0 0 0)
        Coordinate r_shoulder_xRotation: motion_type=rotational range=(-3.141593 0)
        Coordinate r_shoulder_yRotation: motion_type=rotational range=(-0.7853982 3.926991)
        Coordinate r_shoulder_zRotation: motion_type=rotational range=(-0.7853982 3.141593)
        Coordinate r_shoulder_xTranslation: motion_type=translational range=(-0.01 0.01)
        Coordinate r_shoulder_yTranslation: motion_type=translational range=(-0.01 0.01)
        Coordinate r_shoulder_zTranslation: motion_type=translational range=(-0.01 0.01)
    Body lowerArm: mass=20 mass_center=(0 0 0) inertia_xx=0.1333333 inertia_yy=0.1333333 inertia_zz=0.1333333
        meshes=(arm_r_1mc.vtp arm_r_2distph.vtp arm_r_2mc.vtp arm_r_2midph.vtp arm_r_2proxph.vtp arm_r_3distph.vtp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)
      FreeJoint r_helbow: parent_body=upperArm location_in_parent=(0.0061 -0.2904 -0.0123) location=(0 0 0)
        Coordinate r_helbow_xRotation: motion_type=rotational range=(0 0)
        Coordinate r_helbow_yRotation: motion_type=rotational range=(0 0)
        Coordinate r_helbow_zRotation: motion_type=rotational range=(0 2.617994)
        Coordinate r_helbow_xTranslation: motion_type=translational range=(-0.01 0.01)
        Coordinate r_helbow_yTranslation: motion_type=translational range=(-0.01 0.01)
        Coordinate r_helbow_zTranslation: motion_type=translational range=(-0.01 0.01)
    Body stlPart: mass=20 mass_center=(0 0 0) inertia_xx=0.1333333 inertia_yy=0.1333333 inertia_zz=0.1333333
        meshes=drillPart.STL
      PinJoint drillJoint: parent_body=ground location_in_parent=(-0.017545 -0.007 0.17) location=(0 0 0)
        Coordinate drillJoint_coord_0: motion_type=rotational
