# OpenSim document version 30000
Model rightArmModel:
  length_units: meters
  force_units: N
  gravity: 0 -9.80665 0
  credits:
    Frank Anderson, Peter Loan, Ayman Habib, Ajay Seth, Michael Sherman
  BodySet:
    Body ground: mass=0 mass_center=(0 0 0) inertia_xx=1 inertia_yy=1 inertia_zz=1
    Body torso: mass=0 mass_center=(0 0 0) inertia_xx=0 inertia_yy=0 inertia_zz=0
        meshes=(ground_jaw.vtp ground_r_clavicle.vtp ground_r_scapula.vtp ground_ribs.vtp ground_skull.vtp ground_spine.vtp)
      PinJoint mainJoint: parent_body=ground location_in_parent=(-0.017545 -0.007 0.17) location=(0 0 0)
        Coordinate mainJoint_coord_0: motion_type=rotational
    Body pelvis: mass=0 mass_center=(0 0 0) inertia_xx=0 inertia_yy=0 inertia_zz=0
        meshes=(sacrum.vtp pelvis.vtp l_pelvis.vtp)
    Body femur_l: mass=0 mass_center=(0 0 0) inertia_xx=0 inertia_yy=0 inertia_zz=0 meshes=femur_l.vtp
    Body femur_r: mass=0 mass_center=(0 0 0) inertia_xx=0 inertia_yy=0 inertia_zz=0 meshes=femur_r.vtp
    Body tibia_r: mass=0 mass_center=(0 0 0) inertia_xx=0 inertia_yy=0 inertia_zz=0 meshes=(tibia_r.vtp fibula_r.vtp)
    Body tibia_l: mass=0 mass_center=(0 0 0) inertia_xx=0 inertia_yy=0 inertia_zz=0 meshes=(tibia_l.vtp fibula_l.vtp)
    Body talus_r: mass=0 mass_center=(0 0 0) inertia_xx=0 inertia_yy=0 inertia_zz=0 meshes=talus_rv.vtp
    Body talus_l: mass=0 mass_center=(0 0 0) inertia_xx=0 inertia_yy=0 inertia_zz=0 meshes=talus_lv.vtp
    Body calcn_r: mass=0 mass_center=(0 0 0) inertia_xx=0 inertia_yy=0 inertia_zz=0 meshes=foot.vtp
    Body calcn_l: mass=0 mass_center=(0 0 0) inertia_xx=0 inertia_yy=0 inertia_zz=0 meshes=l_foot.vtp
    Body toes_r: mass=0 mass_center=(0 0 0) inertia_xx=0 inertia_yy=0 inertia_zz=0 meshes=bofoot.vtp
    Body toes_l: mass=0 mass_center=(0 0 0) inertia_xx=0 inertia_yy=0 inertia_zz=0 meshes=l_bofoot.vtp
    Body humerus_l: mass=20 mass_center=(0 0 0) inertia_xx=0.1333333 inertia_yy=0.1333333 inertia_zz=0.1333333
        meshes=humerus_l.vtp
    Body humerus_r: mass=20 mass_center=(0 0 0) inertia_xx=0.1333333 inertia_yy=0.1333333 inertia_zz=0.1333333
        meshes=humerus_rv.vtp
      FreeJoint shoulder_r: parent_body=torso location_in_parent=(-0.017545 -0.007 0.17) location=(0 0 0)
        Coordinate shoulder_r_xRotation: motion_type=rotational range=(-3.141593 0)
        Coordinate shoulder_r_yRotation: motion_type=rotational range=(-0.7853982 3.926991)
        Coordinate shoulder_r_zRotation: motion_type=rotational range=(-0.7853982 3.141593)
        Coordinate shoulder_r_xTranslation: motion_type=translational range=(-0.01 0.01)
        Coordinate shoulder_r_yTranslation: motion_type=translational range=(-0.01 0.01)
        Coordinate shoulder_r_zTranslation: motion_type=translational range=(-0.01 0.01)
    Body ulna_l: mass=0 mass_center=(0 0 0) inertia_xx=0 inertia_yy=0 inertia_zz=0 meshes=ulna_lv.vtp
    Body ulna_r: mass=0 mass_center=(0 0 0) inertia_xx=0 inertia_yy=0 inertia_zz=0 meshes=ulna_rv.vtp
      FreeJoint r_helbow: parent_body=humerus_r location_in_parent=(0.0061 -0.2904 -0.0123) location=(0 0 0)
        Coordinate r_helbow_xRotation: motion_type=rotational range=(0 0)
        Coordinate r_helbow_yRotation: motion_type=rotational range=(0 0)
        Coordinate r_helbow_zRotation: motion_type=rotational range=(0 2.617994)
        Coordinate r_helbow_xTranslation: motion_type=translational range=(-0.01 0.01)
        Coordinate r_helbow_yTranslation: motion_type=translational range=(-0.01 0.01)
        Coordinate r_helbow_zTranslation: motion_type=translational range=(-0.01 0.01)
    Body radius_l: mass=0 mass_center=(0 0 0) inertia_xx=0 inertia_yy=0 inertia_zz=0 meshes=radius_lv.vtp
    Body radius_r: mass=0 mass_center=(0 0 0) inertia_xx=0 inertia_yy=0 inertia_zz=0 meshes=radius_rv.vtp
    Body hand_l: mass=0 mass_center=(0 0 0) inertia_xx=0 inertia_yy=0 inertia_zz=0
        meshes=(pisiform_lsv.vtp lunate_lsv.vtp scaphoid_lsv.vtp triquetrum_lsv.vtp hamate_lsv.vtp capitate_lsv.vtp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)
    Body hand_r: mass=0 mass_center=(0 0 0) inertia_xx=0 inertia_yy=0 inertia_zz=0
        meshes=(pisiform_rsv.vtp lunate_rsv.vtp scaphoid_rsv.vtp triquetrum_rsv.vtp hamate_rsv.vtp capitate_rsv.vtp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)
