# OpenSim document version 30000
Model bodyModel:
  length_units: meters
  force_units: N
  gravity: 0 -9.80665 0
  credits:
    Frank Anderson, Peter Loan, Ayman Habib, Ajay Seth, Michael Sherman
  BodySet:
    Body ground: mass=0 mass_center=(0 0 0) inertia_xx=1 inertia_yy=1 inertia_zz=1
    Body pelvis: mass=0 mass_center=(0 0 0) inertia_xx=0 inertia_yy=0 inertia_zz=0
        meshes=(sacrum.vtp pelvis.vtp l_pelvis.vtp)
      PinJoint ground_pelvis: parent_body=ground location_in_parent=(0 0 0) location=(0 0 0)
        Coordinate ground_pelvis_coord_0: motion_type=rotational
    Body femur_l: mass=0 mass_center=(0 0 0) inertia_xx=0 inertia_yy=0 inertia_zz=0 meshes=femur_l.vtp
      FreeJoint hip_l: parent_body=pelvis location_in_parent=(-0.0707 -0.0661 -0.0835) location=(0 0 0)
        Coordinate hip_l_xRotation: motion_type=rotational range=(0 0)
        Coordinate hip_l_yRotation: motion_type=rotational range=(0 0)
        Coordinate hip_l_zRotation: motion_type=rotational range=(-2.617994 2.617994)
        Coordinate hip_l_xTranslation: motion_type=translational range=(-0.01 0.01)
        Coordinate hip_l_yTranslation: motion_type=translational range=(-0.01 0.01)
        Coordinate hip_l_zTranslation: motion_type=translational range=(-0.01 0.01)
    Body femur_r: mass=0 mass_center=(0 0 0) inertia_xx=0 inertia_yy=0 inertia_zz=0 meshes=femur_r.vtp
      FreeJoint hip_r: parent_body=pelvis location_in_parent=(-0.0707 -0.0661 0.0835) location=(0 0 0)
        Coordinate hip_r_xRotation: motion_type=rotational range=(0 0)
        Coordinate hip_r_yRotation: motion_type=rotational range=(0 0)
        Coordinate hip_r_zRotation: motion_type=rotational range=(-2.617994 2.617994)
        Coordinate hip_r_xTranslation: motion_type=translational range=(-0.01 0.01)
        Coordinate hip_r_yTranslation: motion_type=translational range=(-0.01 0.01)
        Coordinate hip_r_zTranslation: motion_type=translational range=(-0.01 0.01)
    Body tibia_l: mass=0 mass_center=(0 0 0) inertia_xx=0 inertia_yy=0 inertia_zz=0 meshes=(tibia_l.vtp fibula_l.vtp)
      FreeJoint knee_l: parent_body=femur_l location_in_parent=(0 -0.39 0) location=(0 0 0)
        Coordinate knee_l_xRotation: motion_type=rotational range=(0 0)
        Coordinate knee_l_yRotation: motion_type=rotational range=(0 0)
        Coordinate knee_l_zRotation: motion_type=rotational range=(-2.617994 2.617994)
        Coordinate knee_l_xTranslation: motion_type=translational range=(-0.01 0.01)
        Coordinate knee_l_yTranslation: motion_type=translational range=(-0.01 0.01)
        Coordinate knee_l_zTranslation: motion_type=translational range=(-0.01 0.01)
    Body talus_l: mass=0 mass_center=(0 0 0) inertia_xx=0 inertia_yy=0 inertia_zz=0 meshes=talus_lv.vtp
      FreeJoint ankle_l: parent_body=tibia_l location_in_parent=(0 -0.43 0) location=(0 0 0)
        Coordinate ankle_l_xRotation: motion_type=rotational range=(0 0)
        Coordinate ankle_l_yRotation: motion_type=rotational range=(0 0)
        Coordinate ankle_l_zRotation: motion_type=rotational range=(-2.617994 2.617994)
        Coordinate ankle_l_xTranslation: motion_type=translational range=(-0.01 0.01)
        Coordinate ankle_l_yTranslation: motion_type=translational range=(-0.01 0.01)
        Coordinate ankle_l_zTranslation: motion_type=translational range=(-0.01 0.01)
    Body calcn_l: mass=0 mass_center=(0 0 0) inertia_xx=0 inertia_yy=0 inertia_zz=0 meshes=l_foot.vtp
      FreeJoint subtalar_l: parent_body=talus_l location_in_parent=(-0.04877 -0.04195 -0.00792) location=(0 0 0)
        Coordinate subtalar_l_xRotation: motion_type=rotational range=(0 0)
        Coordinate subtalar_l_yRotation: motion_type=rotational range=(0 0)
        Coordinate subtalar_l_zRotation: motion_type=rotational range=(-2.617994 2.617994)
        Coordinate subtalar_l_xTranslation: motion_type=translational range=(-0.01 0.01)
        Coordinate subtalar_l_yTranslation: motion_type=translational range=(-0.01 0.01)
        Coordinate subtalar_l_zTranslation: motion_type=translational range=(-0.01 0.01)
    Body tibia_r: mass=0 mass_center=(0 0 0) inertia_xx=0 inertia_yy=0 inertia_zz=0 meshes=(tibia_r.vtp fibula_r.vtp)
      FreeJoint knee_r: parent_body=femur_r location_in_parent=(0 -0.39 0) location=(0 0 0)
        Coordinate knee_r_xRotation: motion_type=rotational range=(0 0)
        Coordinate knee_r_yRotation: motion_type=rotational range=(0 0)
        Coordinate knee_r_zRotation: motion_type=rotational range=(-2.617994 2.617994)
        Coordinate knee_r_xTranslation: motion_type=translational range=(-0.01 0.01)
        Coordinate knee_r_yTranslation: motion_type=translational range=(-0.01 0.01)
        Coordinate knee_r_zTranslation: motion_type=translational range=(-0.01 0.01)
    Body talus_r: mass=0 mass_center=(0 0 0) inertia_xx=0 inertia_yy=0 inertia_zz=0 meshes=talus_rv.vtp
      FreeJoint ankle_r: parent_body=tibia_r location_in_parent=(0 -0.43 0) location=(0 0 0)
        Coordinate ankle_r_xRotation: motion_type=rotational range=(0 0)
        Coordinate ankle_r_yRotation: motion_type=rotational range=(0 0)
        Coordinate ankle_r_zRotation: motion_type=rotational range=(-2.617994 2.617994)
        Coordinate ankle_r_xTranslation: motion_type=translational range=(-0.01 0.01)
        Coordinate ankle_r_yTranslation: motion_type=translational range=(-0.01 0.01)
        Coordinate ankle_r_zTranslation: motion_type=translational range=(-0.01 0.01)
    Body calcn_r: mass=0 mass_center=(0 0 0) inertia_xx=0 inertia_yy=0 inertia_zz=0 meshes=foot.vtp
      FreeJoint subtalar_r: parent_body=talus_r location_in_parent=(-0.04877 -0.04195 0.00792) location=(0 0 0)
        Coordinate subtalar_r_xRotation: motion_type=rotational range=(0 0)
        Coordinate subtalar_r_yRotation: motion_type=rotational range=(0 0)
        Coordinate subtalar_r_zRotation: motion_type=rotational range=(-2.617994 2.617994)
        Coordinate subtalar_r_xTranslation: motion_type=translational range=(-0.01 0.01)
        Coordinate subtalar_r_yTranslation: motion_type=translational range=(-0.01 0.01)
        Coordinate subtalar_r_zTranslation: motion_type=translational range=(-0.01 0.01)
    Body toes_l: mass=0 mass_center=(0 0 0) inertia_xx=0 inertia_yy=0 inertia_zz=0 meshes=l_bofoot.vtp
      FreeJoint mtp_l: parent_body=calcn_l location_in_parent=(0.1788 -0.002 -0.00108) location=(0 0 0)
        Coordinate mtp_l_xRotation: motion_type=rotational range=(0 0)
        Coordinate mtp_l_yRotation: motion_type=rotational range=(0 0)
        Coordinate mtp_l_zRotation: motion_type=rotational range=(-2.617994 2.617994)
        Coordinate mtp_l_xTranslation: motion_type=translational range=(-0.01 0.01)
        Coordinate mtp_l_yTranslation: motion_type=translational range=(-0.01 0.01)
        Coordinate mtp_l_zTranslation: motion_type=translational range=(-0.01 0.01)
    Body toes_r: mass=0 mass_center=(0 0 0) inertia_xx=0 inertia_yy=0 inertia_zz=0 meshes=bofoot.vtp
      FreeJoint mtp_r: parent_body=calcn_r location_in_parent=(0.1788 -0.002 0.00108) location=(0 0 0)
        Coordinate mtp_r_xRotation: motion_type=rotational range=(0 0)
        Coordinate mtp_r_yRotation: motion_type=rotational range=(0 0)
        Coordinate mtp_r_zRotation: motion_type=rotational range=(-2.617994 2.617994)
        Coordinate mtp_r_xTranslation: motion_type=translational range=(-0.01 0.01)
        Coordinate mtp_r_yTranslation: motion_type=translational range=(-0.01 0.01)
        Coordinate mtp_r_zTranslation: motion_type=translational range=(-0.01 0.01)
    Body torso: mass=26.82 mass_center=(0 0 0) inertia_xx=0.1788 inertia_yy=0.1788 inertia_zz=0.1788
        meshes=(hat_jaw.vtp hat_spine.vtp hat_skull.vtp hat_ribs.vtp)
      FreeJoint back: parent_body=pelvis location_in_parent=(-0.1007 0.0815 0) location=(0 0 0)
        Coordinate back_xRotation: motion_type=rotational range=(0 0)
        Coordinate back_yRotation: motion_type=rotational range=(0 0)
        Coordinate back_zRotation: motion_type=rotational range=(-2.617994 2.617994)
        Coordinate back_xTranslation: motion_type=translational range=(-0.01 0.01)
        Coordinate back_yTranslation: motion_type=translational range=(-0.01 0.01)
        Coordinate back_zTranslation: motion_type=translational range=(-0.01 0.01)
    Body humerus_l: mass=0 mass_center=(0 0 0) inertia_xx=0 inertia_yy=0 inertia_zz=0 meshes=humerus_lv.vtp
      FreeJoint acromial_l: parent_body=torso location_in_parent=(0.003155 0.3715 -0.17) location=(0 0 0)
        Coordinate acromial_l_xRotation: motion_type=rotational range=(0 0)
        Coordinate acromial_l_yRotation: motion_type=rotational range=(0 0)
        Coordinate acromial_l_zRotation: motion_type=rotational range=(-2.617994 2.617994)
        Coordinate acromial_l_xTranslation: motion_type=translational range=(-0.01 0.01)
        Coordinate acromial_l_yTranslation: motion_type=translational range=(-0.01 0.01)
        Coordinate acromial_l_zTranslation: motion_type=translational range=(-0.01 0.01)
    Body humerus_r: mass=0 mass_center=(0 0 0) inertia_xx=0 inertia_yy=0 inertia_zz=0 meshes=humerus_rv.vtp
      FreeJoint acromial_r: parent_body=torso location_in_parent=(0.003155 0.3715 0.17) location=(0 0 0)
        Coordinate acromial_r_xRotation: motion_type=rotational range=(0 0)
        Coordinate acromial_r_yRotation: motion_type=rotational range=(0 0)
        Coordinate acromial_r_zRotation: motion_type=rotational range=(-2.617994 2.617994)
        Coordinate acromial_r_xTranslation: motion_type=translational range=(-0.01 0.01)
        Coordinate acromial_r_yTranslation: motion_type=translational range=(-0.01 0.01)
        Coordinate acromial_r_zTranslation: motion_type=translational range=(-0.01 0.01)
    Body ulna_l: mass=0 mass_center=(0 0 0) inertia_xx=0 inertia_yy=0 inertia_zz=0 meshes=ulna_lv.vtp
      FreeJoint elbow_l: parent_body=humerus_l location_in_parent=(0.013144 -0.286273 0.009595) location=(0 0 0)
        Coordinate elbow_l_xRotation: motion_type=rotational range=(0 0)
        Coordinate elbow_l_yRotation: motion_type=rotational range=(0 0)
        Coordinate elbow_l_zRotation: motion_type=rotational range=(-2.617994 2.617994)
        Coordinate elbow_l_xTranslation: motion_type=translational range=(-0.01 0.01)
        Coordinate elbow_l_yTranslation: motion_type=translational range=(-0.01 0.01)
        Coordinate elbow_l_zTranslation: motion_type=translational range=(-0.01 0.01)
    Body radius_l: mass=0 mass_center=(0 0 0) inertia_xx=0 inertia_yy=0 inertia_zz=0 meshes=radius_lv.vtp
      FreeJoint radioulnar_l: parent_body=ulna_l location_in_parent=(-0.006727 -0.013007 -0.026083) location=(0 0 0)
        Coordinate radioulnar_l_xRotation: motion_type=rotational range=(0 0)
        Coordinate radioulnar_l_yRotation: motion_type=rotational range=(0 0)
        Coordinate radioulnar_l_zRotation: motion_type=rotational range=(-2.617994 2.617994)
        Coordinate radioulnar_l_xTranslation: motion_type=translational range=(-0.01 0.01)
        Coordinate radioulnar_l_yTranslation: motion_type=translational range=(-0.01 0.01)
        Coordinate radioulnar_l_zTranslation: motion_type=translational range=(-0.01 0.01)
    Body hand_l: mass=0 mass_center=(0 0 0) inertia_xx=0 inertia_yy=0 inertia_zz=0
        meshes=(pisiform_lvs.vtp lunate_lvs.vtp scaphoid_lvs.vtp triquetrum_lvs.vtp hamate_lvs.vtp capitate_lvs.vtp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)
      FreeJoint radius_hand_l: parent_body=radius_l location_in_parent=(-0.008797 -0.235841 -0.01361) location=(0 0 0)
        Coordinate radius_hand_l_xRotation: motion_type=rotational range=(0 0)
        Coordinate radius_hand_l_yRotation: motion_type=rotational range=(0 0)
        Coordinate radius_hand_l_zRotation: motion_type=rotational range=(-2.617994 2.617994)
        Coordinate radius_hand_l_xTranslation: motion_type=translational range=(-0.01 0.01)
        Coordinate radius_hand_l_yTranslation: motion_type=translational range=(-0.01 0.01)
        Coordinate radius_hand_l_zTranslation: motion_type=translational range=(-0.01 0.01)
    Body ulna_r: mass=0 mass_center=(0 0 0) inertia_xx=0 inertia_yy=0 inertia_zz=0 meshes=ulna_rv.vtp
      FreeJoint elbow_r: parent_body=humerus_r location_in_parent=(0.013144 -0.286273 -0.009595) location=(0 0 0)
        Coordinate elbow_r_xRotation: motion_type=rotational range=(0 0)
        Coordinate elbow_r_yRotation: motion_type=rotational range=(0 0)
        Coordinate elbow_r_zRotation: motion_type=rotational range=(-2.617994 2.617994)
        Coordinate elbow_r_xTranslation: motion_type=translational range=(-0.01 0.01)
        Coordinate elbow_r_yTranslation: motion_type=translational range=(-0.01 0.01)
        Coordinate elbow_r_zTranslation: motion_type=translational range=(-0.01 0.01)
    Body radius_r: mass=0 mass_center=(0 0 0) inertia_xx=0 inertia_yy=0 inertia_zz=0 meshes=radius_rv.vtp
      FreeJoint radioulnar_r: parent_body=ulna_r location_in_parent=(-0.006727 -0.013007 0.026083) location=(0 0 0)
        Coordinate radioulnar_r_xRotation: motion_type=rotational range=(0 0)
        Coordinate radioulnar_r_yRotation: motion_type=rotational range=(0 0)
        Coordinate radioulnar_r_zRotation: motion_type=rotational range=(-2.617994 2.617994)
        Coordinate radioulnar_r_xTranslation: motion_type=translational range=(-0.01 0.01)
        Coordinate radioulnar_r_yTranslation: motion_type=translational range=(-0.01 0.01)
        Coordinate radioulnar_r_zTranslation: motion_type=translational range=(-0.01 0.01)
    Body hand_r: mass=0 mass_center=(0 0 0) inertia_xx=0 inertia_yy=0 inertia_zz=0
        meshes=(pisiform_rvs.vtp lunate_rvs.vtp scaphoid_rvs.vtp triquetrum_rvs.vtp hamate_rvs.vtp capitate_rvs.vtp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)
      FreeJoint radius_hand_r: parent_body=radius_r location_in_parent=(-0.008797 -0.235841 0.01361) location=(0 0 0)
        Coordinate radius_hand_r_xRotation: motion_type=rotational range=(0 0)
        Coordinate radius_hand_r_yRotation: motion_type=rotational range=(0 0)
        Coordinate radius_hand_r_zRotation: motion_type=rotational range=(-2.617994 2.617994)
        Coordinate radius_hand_r_xTranslation: motion_type=translational range=(-0.01 0.01)
        Coordinate radius_hand_r_yTranslation: motion_type=translational range=(-0.01 0.01)
        Coordinate radius_hand_r_zTranslation: motion_type=translational range=(-0.01 0.01)
  ForceSet:
    Thelen2003Muscle [values shared by the 26 below unless stated]: min_control=0 max_control=1
        max_isometric_force=1000 optimal_fiber_length=0.1 tendon_slack_length=0.2
        pennation_angle_at_optimal=0 [radians] activation_time_constant=0.0001 deactivation_time_constant=1
    Thelen2003Muscle BicLongL:
      PathPoint BicLongL1: torso (-0.039235 0.36 -0.14795)
      PathPoint BicLongL2: torso (-0.028945 0.36 -0.15639)
      PathPoint BicLongL3: humerus_l (0.02131 0.01793 -0.01028)
      PathPoint BicLongL4: humerus_l (0.02378 -0.00511 -0.01201)
      PathPoint BicLongL5: humerus_l (0.02 -0.02827 -0.00136)
      PathPoint BicLongL6: humerus_l (0.02 -0.07736 0.00165)
      PathPoint BicLongL7: humerus_l (0.01703 -0.12125 -0.00024)
      PathPoint BicLongL8: humerus_l (0.0228 -0.1754 0.0063)
      PathPoint BicLongL9: radius_l (0.00751 0.024 0)
    Thelen2003Muscle BicLongR:
      PathPoint BicLongR1: torso (-0.039235 0.36 0.14795)
      PathPoint BicLongR2: torso (-0.028945 0.36 0.15639)
      PathPoint BicLongR3: humerus_r (0.02131 0.01793 0.01028)
      PathPoint BicLongR4: humerus_r (0.02378 -0.00511 0.01201)
      PathPoint BicLongR5: humerus_r (0.02 -0.02827 0.00136)
      PathPoint BicLongR6: humerus_r (0.02 -0.07736 -0.00165)
      PathPoint BicLongR7: humerus_r (0.01703 -0.12125 0.00024)
      PathPoint BicLongR8: humerus_r (0.0228 -0.1754 -0.0063)
      PathPoint BicLongR9: radius_r (0.00751 0.024 0)
    Thelen2003Muscle BicShortL:
      PathPoint BicShortL1: torso (0.004675 0.36 -0.15)
      PathPoint BicShortL2: torso (-0.007075 0.36 -0.15)
      PathPoint BicShortL3: humerus_l (0.01117 -0.07576 0.01101)
      PathPoint BicShortL4: humerus_l (0.01703 -0.12125 0.01079)
      PathPoint BicShortL5: humerus_l (0.0228 -0.1754 0.0063)
      PathPoint BicShortL6: radius_l (0.00751 0.024 0)
    Thelen2003Muscle BicShortR:
      PathPoint BicShortR1: torso (0.004675 0.36 0.15)
      PathPoint BicShortR2: torso (-0.007075 0.36 0.15)
      PathPoint BicShortR3: humerus_r (0.01117 -0.07576 -0.01101)
      PathPoint BicShortR4: humerus_r (0.01703 -0.12125 -0.01079)
      PathPoint BicShortR5: humerus_r (0.0228 -0.1754 -0.0063)
      PathPoint BicShortR6: radius_r (0.00751 0.024 0)
    Thelen2003Muscle BraL:
      PathPoint BraL1: humerus_l (0.009 -0.1739 0.0036)
      PathPoint BraL2: radius_l (0.023 -0.0239 -0.001)
    Thelen2003Muscle BraR:
      PathPoint BraR1: humerus_r (0.009 -0.1739 -0.0036)
      PathPoint BraR2: radius_r (0.023 -0.0239 0.001)
    Thelen2003Muscle EcrbL:
      PathPoint EcrbL1: humerus_l (0.02254 -0.26813 -0.00679)
      PathPoint EcrbL2: radius_l (-0.00384 -0.1248 -0.00482)
      PathPoint EcrbL3: radius_l (-0.01733 -0.22 -0.0004)
    Thelen2003Muscle EcrbR:
      PathPoint EcrbR1: humerus_r (0.02254 -0.26813 0.00679)
      PathPoint EcrbR2: radius_r (-0.00384 -0.1248 0.00482)
      PathPoint EcrbR3: radius_r (-0.01733 -0.22 0.0004)
    Thelen2003Muscle EcrlL:
      PathPoint EcrlL1: humerus_l (0.01337 -0.26111 -0.00069)
      PathPoint EcrlL2: humerus_l (0.02239 -0.26834 -0.00679)
      PathPoint EcrlL3: radius_l (-0.00136 -0.12953 -0.00532)
      PathPoint EcrlL4: radius_l (-0.0083 -0.21052 -0.0052)
    Thelen2003Muscle EcrlR:
      PathPoint EcrlR1: humerus_r (0.01337 -0.26111 0.00069)
      PathPoint EcrlR2: humerus_r (0.02239 -0.26834 0.00679)
      PathPoint EcrlR3: radius_r (-0.00136 -0.12953 0.00532)
      PathPoint EcrlR4: radius_r (-0.0083 -0.21052 0.0052)
    Thelen2003Muscle ErcSpnL:
      PathPoint ErcSpnL1: pelvis (-0.14 0.0439 -0.0436)
      PathPoint ErcSpnL2: torso (-0.055 0.11 -0.0241)
    Thelen2003Muscle ErcSpnR:
      PathPoint ErcSpnR1: pelvis (-0.14 0.0439 0.0436)
      PathPoint ErcSpnR2: torso (-0.055 0.11 0.0241)
    Thelen2003Muscle ExtOblL:
      PathPoint ExtOblL1: pelvis (-0.03 -0.0636 -0.01)
      PathPoint ExtOblL2: torso (0.065 0.11 -0.11)
    Thelen2003Muscle ExtOblR:
      PathPoint ExtOblR1: pelvis (-0.03 -0.0636 0.01)
      PathPoint ExtOblR2: torso (0.065 0.11 0.11)
    Thelen2003Muscle FcrL:
      PathPoint FcrL1: humerus_l (0.00639 -0.27761 -0.01313)
      PathPoint FcrL2: radius_l (0.00953 -0.21667 -0.035)
    Thelen2003Muscle FcrR:
      PathPoint FcrR1: humerus_r (0.00639 -0.27761 0.01313)
      PathPoint FcrR2: radius_r (0.00953 -0.21667 0.035)
    Thelen2003Muscle FcuL:
      PathPoint FcuL1: humerus_l (0.00463 -0.27768 -0.01318)
      PathPoint FcuL2: ulna_l (-0.00465 -0.22771 -0.05589)
      PathPoint FcuL3: ulna_l (-0.01368 -0.22899 -0.05805)
    Thelen2003Muscle FcuR:
      PathPoint FcuR1: humerus_r (0.00463 -0.27768 0.01318)
      PathPoint FcuR2: ulna_r (-0.00465 -0.22771 0.05589)
      PathPoint FcuR3: ulna_r (-0.01368 -0.22899 0.05805)
    Thelen2003Muscle IntOblL:
      PathPoint IntOblL1: pelvis (-0.14 0.07 -0.1157)
      PathPoint IntOblL2: torso (0.07 0.16 -0.015)
    Thelen2003Muscle IntOblR:
      PathPoint IntOblR1: pelvis (-0.14 0.07 0.1157)
      PathPoint IntOblR2: torso (0.07 0.16 0.015)
    Thelen2003Muscle TriLatL:
      PathPoint TriLatL1: humerus_l (-0.00599 -0.12646 -0.00428)
      PathPoint TriLatL2: humerus_l (-0.02344 -0.14528 -0.00928)
      PathPoint TriLatL3: humerus_l (-0.03184 -0.22637 0.01217)
      PathPoint TriLatL4: humerus_l (-0.01743 -0.26757 0.01208)
      PathPoint TriLatL5: radius_l (-0.0219 0.01046 0.00078)
    Thelen2003Muscle TriLatR:
      PathPoint TriLatR1: humerus_r (-0.00599 -0.12646 0.00428)
      PathPoint TriLatR2: humerus_r (-0.02344 -0.14528 0.00928)
      PathPoint TriLatR3: humerus_r (-0.03184 -0.22637 -0.01217)
      PathPoint TriLatR4: humerus_r (-0.01743 -0.26757 -0.01208)
      PathPoint TriLatR5: radius_r (-0.0219 0.01046 -0.00078)
    Thelen2003Muscle TriLongL:
      PathPoint TriLongL1: torso (-0.01 0.36 -0.14723)
      PathPoint TriLongL2: humerus_l (-0.02714 -0.11441 0.00664)
      PathPoint TriLongL3: humerus_l (-0.03184 -0.22637 0.01217)
      PathPoint TriLongL4: humerus_l (-0.01743 -0.26757 0.01208)
      PathPoint TriLongL5: radius_l (-0.0219 0.01046 0.00078)
    Thelen2003Muscle TriLongR:
      PathPoint TriLongR1: torso (-0.01 0.36 0.14723)
      PathPoint TriLongR2: humerus_r (-0.02714 -0.11441 -0.00664)
      PathPoint TriLongR3: humerus_r (-0.03184 -0.22637 -0.01217)
      PathPoint TriLongR4: humerus_r (-0.01743 -0.26757 -0.01208)
      PathPoint TriLongR5: radius_r (-0.0219 0.01046 -0.00078)
    Thelen2003Muscle TriMedL:
      PathPoint TriMedL1: humerus_l (-0.00838 -0.13695 0.00906)
      PathPoint TriMedL2: humerus_l (-0.02601 -0.15139 0.0108)
      PathPoint TriMedL3: humerus_l (-0.03184 -0.22637 0.01217)
      PathPoint TriMedL4: humerus_l (-0.01743 -0.26757 0.01208)
      PathPoint TriMedL5: radius_l (-0.0219 0.01046 0.00078)
    Thelen2003Muscle TriMedR:
      PathPoint TriMedR1: humerus_r (-0.00838 -0.13695 -0.00906)
      PathPoint TriMedR2: humerus_r (-0.02601 -0.15139 -0.0108)
      PathPoint TriMedR3: humerus_r (-0.03184 -0.22637 -0.01217)
      PathPoint TriMedR4: humerus_r (-0.01743 -0.26757 -0.01208)
      PathPoint TriMedR5: radius_r (-0.0219 0.01046 -0.00078)
  MarkerSet:
    Marker humerusL: humerus_l (0.05 -0.15 0)
    Marker humerusR: humerus_r (0.05 -0.15 0)
    Marker raduisL: radius_l (0.03 -0.1 0)
    Marker raduisR: radius_r (0.03 -0.1 0)
